Lunit = 0.0254 m
Munit = 0.02835 kg
Tunit = 1.0 s
g   = 9.81
rho = 1.225
#mass     x       y        z        Ixx      Iyy      Izz
1.31057   3.01943   8.31757   1.89454   35.5668   5.45334   37.9261        ! main wing
1.31057   3.01943   -8.31757  1.89454   35.5668   5.45334   37.9261        ! main wing
0.453128  2.85551   21.9314   4.7914    3.31979   1.22487   4.92187        ! main wing
0.453128  2.85551   -21.9314  4.7914    3.31979   1.22487   4.92187        ! main wing
0.282192  26.4596   2.71165   1.89881   1.37261   0.679462  1.15356        ! stab
0.282192  26.4596   -2.71165  1.89881   1.37261   0.679462  1.15356        ! stab
0.536165  9.94304   0.0       -0.19685  0.00855248 41.4344   41.4344        ! body
0.296302  1.9685    0.0       0.0       0.0       0.0       0.0            ! Verbindugsstahl
0.627877  6.49606   0.0       0.0       0.0       0.0       0.0            ! Zwei Servos mit Klem
0.186952  16.7323   0.0       0.0       1.44888E-4 6.78326   6.78326        ! Anlenkungen
0.543219  6.29921   0.0       0.0       0.0       0.0       0.0            ! scan7 mit
0.62435   0.0       0.0       0.0       0.0       0.0       0.0            ! Elektronik ohne
0.0049    25.9843   0.0       0.0       0.0       0.0       0.0            ! Hecksporn
0.469144  0.0       0.0       0.0       0.0       0.0       0.0            ! Flchenauflage und
0.0599658 3.93701   0.0       0.0       0.0       0.0       0.0            ! Holzspanten an der F
0.141096  0.0       0.0       0.0       0.0       0.0       0.0            ! Styroteile Tragflc
0.16226   0.0       0.0       0.0       0.0       0.0       0.0            ! Akkubrett und beide
0.987672  0.0       0.0       0.0       0.0       0.0       0.0            ! Motor (BLDC: pichler
0.211644  -5.7874   0.0       0.0       0.0       0.0       0.0            ! Latte. 7x3,3: 5,3g
0.317466  -2.3622   0.0       0.0       0.0       0.0       0.0            ! Steller mit allen Ka
3.80959   -0.37039  0.0       0.0       0.0       0.0       0.0            ! Akku LiPo 3s, 1300mA
